Origin := 0
t := [700; 900; 1100]
P := [11; 23; 47]
i := 0 .. 1
h[i] := t[i + 1]*(-t)[i]
h = [-630000; -990000]
B := [0; 0]
C := [0; 0]
D := [0; 0]
Given
B[0]*h[0] + C[0]*h[0]^2 + D[0]*h[0]^3 == P[1] - P[0]
B[1]*h[1] + C[1]*h[1]^2 + D[1]*h[1]^3 == P[2] - P[1]
B[1] - B[0] - 2*C[0]*h[0] - 3*D[0]*h[0]^2 == 0
C[1] - C[0] - 3*D[0]*h[0] == 0
C[1] + 3*D[1]*h[1] == 0
C[0] == 0
[B; C; D] := Find(B, C, D)
C = [0; 4.81e-12]
B = [-1.80375e-5; -2.10678e-5]
D = [-2.54498e-18; 1.61953e-18]
i := 0 .. 1
S := P[1] + B[1]*(t - t[1]) + C[1]*(t - t[1])^2 + D[1]*(t - t[1])^3
d := cspline(t, P)
interp(d, t, P, 1000) = 34.25
