a := 3.4834
pi := 3.14
Δpi := 0.0016
Δa := 0.000005
h := 2.6
Δh := 0.05
δa := Δa/|a|
δa = 1.43538e-6
V(pi, h) := pi*h^3/6
V(pi, h) = 9.19811
aa := d/dpi(V(pi, h)) = 2.92933
b := 0.00005422
bb := d/dh(V(pi, h)) = 10.6132
b1 := 0.0000542
Δb := 0.0000001
Δ := |b - b1| = 2e-8
ΔV := |aa|*Δpi + |bb|*Δh = 0.535347
Δb1 := Δb + Δ = 1.2e-7
δV := ΔV/V(pi, h)
δb1 := Δb1/|b1| = 0.00221402
δV = 0.0582019
c := 2.9867
Δc := 0.00001
n := 4
d := 1.4567
Δd := 0.00001
summa := Δc + Δd = 2e-5
razn := Δc + Δd = 2e-5
umn := |c|*Δd + |d|*Δc
del := (|c|*Δd + |d|*Δc)/d^2 = 2.09399e-5
step := n*c^(n - 1)*Δc = 0.0010657
