x := [1; 2; 3; 4; 5]
y := [0.4; 0.55; 0.13; 0.09; 0.07]
N := length(x) - 1
i := 0 .. N
a := slope(x, y)
a = -0.112
b := intercept(x, y)
b = 0.584
yLiner := a*x + b
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yLiner = [0.472; 0.36; 0.248; 0.136; 0.024]
sum((y - yLiner)^2) = 0.05944
