x := [1; 2; 3; 4; 5]
y := [0.4; 0.55; 0.13; 0.09; 0.07]
N := length(x) - 1
i := 0 .. N
k := exp(intercept(vectorize(ln(x)), vectorize(ln(y))))
m := slope(vectorize(ln(x)), vectorize(ln(y)))
k = 0.589888
m = -1.2496
yS(x) := k*x^m
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yS(x) = [0.589888; 0.248086; 0.149472; 0.104337; 0.0789474]
sum((y - yS(x))^2) = 0.127874
