x := [1; 2; 3; 4; 5]
y := [0.4; 0.55; 0.13; 0.09; 0.07]
N := length(x) - 1
i := 0 .. N
k := exp(intercept(x, vectorize(ln(y))))
m := slope(x, vectorize(ln(y)))
k = 0.873282
m = -0.529605
yP(x) := k*exp(m*x)
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yP(x) = [0.514221; 0.302793; 0.178296; 0.104987; 0.0618205]
sum((y - yP(x))^2) = 0.0767819
