x := [1; 2; 3; 4; 5]
y := [0.4; 0.55; 0.13; 0.09; 0.07]
N := length(x) - 1
i := 0 .. N
k := slope(vectorize(ln(x)), y)
m := intercept(vectorize(ln(x)), y)
k = -0.263586
m = 0.500383
yL(x) := k*ln(x) + m
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yL(x) = [0.500383; 0.317679; 0.210804; 0.134975; 0.0761579]
sum((y - yL(x))^2) = 0.0726397
