x := [1; 2; 3; 4; 5]
y := [0.4; 0.55; 0.13; 0.09; 0.07]
N := length(x) - 1
i := 0 .. N
k := slope(1/x, y)
m := intercept(1/x, y)
k = 0.44802
m = 0.0434042
yH(x) := if(x == 0, "error", k/x + m)
m = 0.0434042
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yH(x) = [0.491424; 0.267414; 0.192744; 0.155409; 0.133008]
sum((y - yH(x))^2) = 0.100398
