x := [1; 2; 3; 4; 5]
y := [0.4; 0.55; 0.13; 0.09; 0.07]
N := length(x) - 1
i := 0 .. N
yK(x) := [1; x; x^2]
a := linfit(x, y, yK)
a = [0.604; -0.129143; 0.00285714]
yU(x) := a[2]*x^2 + a[1]*x + a[0]
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yU(x) = [0.477714; 0.357143; 0.242286; 0.133143; 0.0297143]
sum((y - yU(x))^2) = 0.0593257
