rectangle(a, b, n, f) :=
    h ← (b - a)/n
    S ← 0
    for i ∈ 1 .. n
        x[i - 1] ← a + h*(i - 1)
        S ← S + f(x[i - 1])
    S ← S*h
    S
f(x) := ln(x + 2)
rectangle(0, exp(1), 1000, f) = 3.21441
rectangle1(a, b, n, f) :=
    h ← (b - a)/n
    S ← 0
    for i ∈ 1 .. n
        x[i] ← a + h*i
        S ← S + f(x[i])
    S ← S*h
    S
rectangle1(0, exp(1), 1000, f) = 3.21674
rectangle2(a, b, n, f) :=
    h ← (b - a)/n
    S ← 0
    for i ∈ 1 .. n
        x[i] ← a + h*i
        S ← S + f(x[i] - h/2)
    S ← S*h
    S
rectangle2(0, exp(1), 1000, f) = 3.21558
trap(a, b, n, f) :=
    h ← (b - a)/n
    S ← 0
    for i ∈ 1 .. (n - 1)
        x[i] ← a + h*i
        S ← S + f(x[i])
    S ← (S + (f(a) + f(b))/2)*h
    S
trap(0, exp(1), 1000, f) = 3.21558
simpson(a, b, n, f) :=
    h ← (b - a)/n
    S1 ← 0
    for i ∈ 1 .. (n/2)
        x[2*i - 1] ← a + h*(2*i - 1)
        S1 ← S1 + f(x[2*i - 1])
    S2 ← 0
    for j ∈ 1 .. (n/2 - 1)
        x[2*j] ← a + h*2*j
        S2 ← S2 + f(x[2*j])
    S ← (4*S1 + 2*S2 + (f(a) + f(b)))*h/3
    S
simpson(0, exp(1), 1000, f) = 3.21558
f(x) := ln(x + 2)
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t := 0, 0.125 .. exp(1)
a := 4
b := 10
N := 1000
i := 1 .. N
x[i] := rnd(a)
y[i] := rnd(b)
m[i] := if(y[i] < f(x[i]), 1, 0)
M := sum(m[i], i)
M = 123
S := M*a*b/N
S = 4.92
