f(x) := x^3 - 2*x^2 - 4*x + 5
dihot(a, b, e) :=
    k ← 0
    while 1
        c ← (a + b)/2
        b ← c if f(c)*f(a) < 0
        a ← c otherwise
        k ← k + 1
        break if |a - b| < e
    [c; k]
dihot(2, 3, 0.001) = [2.79199; 10]
f(x) := x^3 - 2*x^2 - 4*x + 5
horda(a, b, e) :=
    k ← 0
    while 1
        c ← a - f(a)*(b - a)/(f(b) - f(a))
        b ← c if f(c)*f(a) < 0
        a ← c otherwise
        k ← k + 1
        break if |f(c)| < e
    [c; k]
horda(2, 3, 0.001) = [2.7912; 5]
