A := [5, 0, 1; 1, 3, -3; -3, 2, 10]
b := [11; 2; 3]
P := augment(A, b)
R := rref(P)
R = [1, 0, 0, 2.04712; 0, 1, 0, 0.748691; 0, 0, 1, 0.764398]
n := cols(R)
x := R[:, n - 1]
x = [2.04712; 0.748691; 0.764398]
A := [5, 0, 1; 1, 3, -3; -3, 2, 10]
b := [11; 2; 3]
t := 0.09
N := 45
x[:, 0] := [11; 12; 6]
D := A^0 - t*A
c := t*b
k := 0 .. N
x[:, k + 1] := D*x[:, k] + c
Δx[k] := |x[:, k + 1] - x[:, k]|
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x[:, N + 1] = [2.04712; 0.748691; 0.764398]
